clock
{
	timezone ${TIMEZONE:-"MST+7MDT"};
	starttime ${STARTTIME:-"2021-01-01 00:00:00 MST"};
	stoptime ${STOPTIME:-"2022-01-01 00:00:00 MST"};
}
#weather get ${WEATHER:-"CO-Denver_Intl_Ap.tmy3"}
#input ${WEATHER:-"CO-Denver_Intl_Ap.tmy3"} -p interpolate=QUADRATIC
module residential
{
	implicit_enduses ${ENDUSES:-DISHWASHER|CLOTHESWASHER|DRYER|WATERHEATER|REFRIGERATOR|RANGE|LIGHTS|PLUGS};
	implicit_enduse_source RBSA2014;
}
module tape
{
	csv_header_type NAME;
}
#set dateformat=ISO8601
#set complex_format="%+.6f%+.6fj"
object house
{
	floor_area ${FLOORAREA:-2500 sf};
	object recorder
	{
		property "panel.power";
		file ${modelname/.glm/.csv};
		interval -1;
	};
}
